# Diseño de Losas
# 0.- Datos iniciales
# Sobrecarga: | Peso Propio
LL_h := 200 kgf/m^2
DL_Tab := □
LL_AcE := 400 kgf/m^2
LL_B := 300 kgf/m^2
LL_A := 500 kgf/m^2
LL_T := 100 kgf/m^2
# 1.- Tipo de Hormigón
# 2.- Dimensiones de Losa (Lx, Ly, e)
Lx := 2 m
Ly := 3 m
e := 16 cm
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# 3.- Parámetros
ε := Ly/Lx = 1.5
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# Tipo de Losa: 4
Φ := 0.76
e := Φ*Lx/35 + 2 cm = 6.34286 cm
# 4.- Momentos positivos (mx, my)
# 5.- Momentos Negativos (mex, mey)
# 6.- Tipo de Hormigón
# 7.- Verificación de separación y armadura mínima
