# Diseño de fundaciones
# MURO: F4X
σ_suelo_estatico := 8 kgf/cm^2
σ_suelo_sismico := 10 kgf/cm^2
# 1. Dimensiones elementos
# Propiedades y esfuerzos de muro: | Dimensiones zapata:
L_muro := 6.76 m
L_zap := 60 cm + L_muro + 60 cm = 7.96 m
e_muro := 25 cm
B_zap := 150 cm
γ_H := 2.5 tonnef/m^3
H_zap := 180 cm
N_zap := γ_H*B_zap*L_zap*H_zap = 53.73 tonnef
# 2. Esfuerzos de ETABS
N_PP := -415.9831 tonnef
M_PP := -176.3241 tonnef*m
V_PP := 26.6489 tonnef
N_SC := -118.0962 tonnef
M_SC := -20.3411 tonnef*m
V_SC := -1.0577 tonnef
N_SX := 216.7196 tonnef
M_SX := 522.4481 tonnef*m
V_SX := 27.6026 tonnef
N_SY := 157.9424 tonnef
M_SY := 59.8586 tonnef*m
V_SY := 8.2291 tonnef
# 3. Combinaciones
# 3.1. Combinaciones estáticas
# Combinación 1 (PP)
N_est1 := N_zap + |N_PP| = 469.713 tonnef
V_est1 := V_PP = 26.6489 tonnef
M_est1 := M_PP = -176.324 tonnef*m
l := L_zap/6 = 1.32667 m
e := |M_est1/N_est1| = 0.375387 m
L' := 3*(L_zap/2 - e) = 10.8138 m
σ_est1 :=
    if e < l
        max(N_est1/(B_zap*L_zap) + 6*M_est1/(B_zap*L_zap^2), N_est1/(B_zap*L_zap) - 6*M_est1/(B_zap*L_zap^2))
    else if e == l
        2*N_est1/(B_zap*L_zap)
    else
        2*N_est1/(B_zap*L')
    = 5.04707 kgf/cm^2
# Factores de seguridad
μ := 0.4
F_D := V_est1 = 26.6489 tonnef
F_R := N_est1*μ = 187.885 tonnef
FS_D := |F_R|/|F_D| = 7.05039
M_V := M_est1 + V_est1*H_zap = -128.356 tonnef*m
M_R := N_est1*L_zap/2 + M_est1 = 1693.13 tonnef*m
FS_V := |M_R|/|M_V| = 13.1909
# Combinación 2 (PP+SC)
N_est2 := N_zap + |N_PP| + |N_SC| = 587.809 tonnef
V_est2 := V_PP + V_SC = 25.5912 tonnef
M_est2 := M_PP + M_SC = -196.665 tonnef*m
l := L_zap/6 = 1.32667 m
e := |M_est2/N_est1| = 0.418692 m
L' := 3*(L_zap/2 - e) = 10.6839 m
σ_est2 :=
    if e < l
        max(N_est2/(B_zap*L_zap) + 6*M_est2/(B_zap*L_zap^2), N_est2/(B_zap*L_zap) - 6*M_est2/(B_zap*L_zap^2))
    else if e == l
        2*N_est2/(B_zap*L_zap)
    else
        2*N_est2/(B_zap*L')
    = 6.16457 kgf/cm^2
σ_est := max(σ_est1, σ_est2) = 6.16457 kgf/cm^2
# Factores de seguridad
μ := 0.4
F_D := V_est2 = 25.5912 tonnef
F_R := N_est2*μ = 235.124 tonnef
FS_D := |F_R|/|F_D| = 9.18768
M_V := M_est2 + V_est2*H_zap = -150.601 tonnef*m
M_R := N_est2*L_zap/2 + M_est2 = 2142.82 tonnef*m
FS_V := |M_R|/|M_V| = 14.2284
# 3.2. Combinaciones sísmicas
# Combinación 3,1 (PP+SX)
N_sis := N_zap + |N_PP| + N_SX = 686.433 tonnef
V_sis := V_PP + V_SX = 54.2515 tonnef
M_sis := M_PP + M_SX = 346.124 tonnef*m
l := L_zap/6 = 1.32667 m
e := |M_sis/N_sis| = 0.504236 m
L' := 3*(L_zap/2 - e) = 10.4273 m
σ_sis31 :=
    if e < l
        max(N_sis/(B_zap*L_zap) + 6*M_sis/(B_zap*L_zap^2), N_sis/(B_zap*L_zap) - 6*M_sis/(B_zap*L_zap^2))
    else if e == l
        2*N_sis/(B_zap*L_zap)
    else
        2*N_sis/(B_zap*L')
    = 7.93409 kgf/cm^2
# Factores de seguridad
μ := 0.4
F_D := V_sis = 54.2515 tonnef
F_R := N_sis*μ = 274.573 tonnef
FS_D := |F_R|/|F_D| = 5.06111
M_V := M_sis + V_sis*H_zap = 443.777 tonnef*m
M_R := N_sis*L_zap/2 + M_sis = 3078.13 tonnef*m
FS_V := |M_R|/|M_V| = 6.9362
# Combinación 3,2 (PP-SX)
N_sis := N_zap + |N_PP| - N_SX = 252.993 tonnef
V_sis := V_PP - V_SX = -0.9537 tonnef
M_sis := M_PP - M_SX = -698.772 tonnef*m
l := L_zap/6 = 1.32667 m
e := |M_sis/N_sis| = 2.76202 m
L' := 3*(L_zap/2 - e) = 3.65395 m
σ_sis32 :=
    if e < l
        max(N_sis/(B_zap*L_zap) + 6*M_sis/(B_zap*L_zap^2), N_sis/(B_zap*L_zap) - 6*M_sis/(B_zap*L_zap^2))
    else if e == l
        2*N_sis/(B_zap*L_zap)
    else
        2*N_sis/(B_zap*L')
    = 9.23178 kgf/cm^2
# Factores de seguridad
μ := 0.4
F_D := V_sis = -0.9537 tonnef
F_R := N_sis*μ = 101.197 tonnef
FS_D := |F_R|/|F_D| = 106.11
M_V := M_sis + V_sis*H_zap = -700.489 tonnef*m
M_R := N_sis*L_zap/2 + M_sis = 308.142 tonnef*m
FS_V := |M_R|/|M_V| = 0.439896
# Combinación 4,1 (PP+0.75(SC+S))
N_sis := N_zap + |N_PP| + 0.75*|N_SC| + 0.75*N_SX = 720.825 tonnef
M_sis := M_PP + 0.75*M_SC + 0.75*M_SX = 200.256 tonnef*m
V_sis := V_PP + 0.75*(V_SC + V_SX) = 46.5576 tonnef
l := L_zap/6 = 1.32667 m
e := |M_sis/N_sis| = 0.277815 m
L' := 3*(L_zap/2 - e) = 11.1066 m
σ_sis41 :=
    if e < l
        max(N_sis/(B_zap*L_zap) + 6*M_sis/(B_zap*L_zap^2), N_sis/(B_zap*L_zap) - 6*M_sis/(B_zap*L_zap^2))
    else if e == l
        2*N_sis/(B_zap*L_zap)
    else
        2*N_sis/(B_zap*L')
    = 7.30127 kgf/cm^2
# Factores de seguridad
μ := 0.4
F_D := V_sis = 46.5576 tonnef
F_R := N_sis*μ = 288.33 tonnef
FS_D := |F_R|/|F_D| = 6.19298
M_V := M_sis + V_sis*H_zap = 284.06 tonnef*m
M_R := N_sis*L_zap/2 + M_sis = 3069.14 tonnef*m
FS_V := |M_R|/|M_V| = 10.8046
# Combinación 4,2 (PP+0.75(SC-S))
N_sis := N_zap + |N_PP| + 0.75*|N_SC| - 0.75*N_SX = 395.746 tonnef
M_sis := M_PP + 0.75*M_SC - 0.75*M_SX = -583.416 tonnef*m
V_sis := V_PP + 0.75*(V_SC - V_SX) = 5.15367 tonnef
l := L_zap/6 = 1.32667 m
e := |M_sis/N_sis| = 1.47422 m
L' := 3*(L_zap/2 - e) = 7.51734 m
σ_sis42 :=
    if e < l
        max(N_sis/(B_zap*L_zap) + 6*M_sis/(B_zap*L_zap^2), N_sis/(B_zap*L_zap) - 6*M_sis/(B_zap*L_zap^2))
    else if e == l
        2*N_sis/(B_zap*L_zap)
    else
        2*N_sis/(B_zap*L')
    = 7.01925 kgf/cm^2
# Factores de seguridad
μ := 0.4
F_D := V_sis = 5.15367 tonnef
F_R := N_sis*μ = 158.298 tonnef
FS_D := |F_R|/|F_D| = 30.7156
M_V := M_sis + V_sis*H_zap = -574.139 tonnef*m
M_R := N_sis*L_zap/2 + M_sis = 991.651 tonnef*m
FS_V := |M_R|/|M_V| = 1.7272
# Combinación 5,1 (0.6PP+SX)
N_sis := 0.6*N_zap + 0.6*|N_PP| + N_SX = 498.547 tonnef
M_sis := 0.6*M_PP + M_SX = 416.654 tonnef*m
V_sis := 0.6*V_PP + V_SX = 43.5919 tonnef
l := L_zap/6 = 1.32667 m
e := |M_sis/N_sis| = 0.835735 m
L' := 3*(L_zap/2 - e) = 9.43279 m
σ_sis51 :=
    if e < l
        max(N_sis/(B_zap*L_zap) + 6*M_sis/(B_zap*L_zap^2), N_sis/(B_zap*L_zap) - 6*M_sis/(B_zap*L_zap^2))
    else if e == l
        2*N_sis/(B_zap*L_zap)
    else
        2*N_sis/(B_zap*L')
    = 6.80576 kgf/cm^2
# Factores de seguridad
μ := 0.4
F_D := V_sis = 43.5919 tonnef
F_R := N_sis*μ = 199.419 tonnef
FS_D := |F_R|/|F_D| = 4.57468
M_V := M_sis + V_sis*H_zap = 495.119 tonnef*m
M_R := N_sis*L_zap/2 + M_sis = 2400.87 tonnef*m
FS_V := |M_R|/|M_V| = 4.84908
# Combinación 5,2 (0.6PP-SX)
N_sis := 0.6*N_zap + 0.6*|N_PP| - N_SX = 65.1083 tonnef
M_sis := 0.6*M_PP - M_SX = -628.243 tonnef*m
V_sis := 0.6*V_PP - V_SX = -11.6133 tonnef
l := L_zap/6 = 1.32667 m
e := |M_sis/N_sis| = 9.6492 m
L' := 3*(L_zap/2 - e) = -17.0076 m
σ_sis52 :=
    if e < l
        max(N_sis/(B_zap*L_zap) + 6*M_sis/(B_zap*L_zap^2), N_sis/(B_zap*L_zap) - 6*M_sis/(B_zap*L_zap^2))
    else if e == l
        2*N_sis/(B_zap*L_zap)
    else
        2*N_sis/(B_zap*L')
    = -0.510425 kgf/cm^2
# Factores de seguridad
μ := 0.4
F_D := V_sis = -11.6133 tonnef
F_R := N_sis*μ = 26.0433 tonnef
FS_D := |F_R|/|F_D| = 2.24255
M_V := M_sis + V_sis*H_zap = -649.146 tonnef*m
M_R := N_sis*L_zap/2 + M_sis = -369.112 tonnef*m
FS_V := |M_R|/|M_V| = 0.568611
σ_sis := max(σ_sis31, σ_sis32, σ_sis41, σ_sis42, σ_sis51, σ_sis52) = 9.23178 kgf/cm^2
# 4. Chequeo parrilla
# Momento lado corto | Momento Lado Largo
M1 := σ_sis*(B_zap/2)^2*1 m/2 = 25.9644 tonnef*m
M2 := σ_sis*((L_zap - L_muro)/2)^2*1 m/2 = 16.6172 tonnef*m
# Propiedad de la Sección de Zapata | Propiedad de la Sección de Zapata
W := 1/6*1 m*H_zap^2 = 0.54 m^3
W := 1/6*1 m*H_zap^2 = 0.54 m^3
M1/W = 4.80822 kgf/cm^2
M2/W = 3.07726 kgf/cm^2
if M1/W < 7 kgf/cm^2
    "No necesita parrilla"
else
    "Necesita Parrilla"
= "No necesita parrilla"
if M2/W < 7 kgf/cm^2
    "No necesita parrilla"
else
    "Necesita Parrilla"
= "No necesita parrilla"
